Ang := 10^-10*m
NA := 6.022*10^23*mol^-1
gr := 1*10^-3 kg
h = 6.62607e-34 kg*m^2/s
k = 1.38065e-23 kg*m^2/(s^2*K)
pi := 3.142
mCa := 40.08*gr/mol
mSi := 28.085*gr/mol
mAl := 26.98*gr/mol
GPa = 1000000000 Pa
mO := 15.999*gr/mol
mmol_Ca3Al2Si3O12 := 3*mCa + 2*mAl + 3*mSi + 12*mO = 0.450443 kg/mol
mmol_primitive := 8*mmol_Ca3Al2Si3O12 = 3.60354 kg/mol
vol := 1714.64*Ang^3
Mav := mmol_Ca3Al2Si3O12/(20*NA) = 3.73998e-26 kg
n := 160
n_p := 80
δ := (vol/n)^(1/3)
δ = 2.20471e-10 m
vol_p := 80*δ^3
vol_p = 8.5732e-25 L
rho := mmol_primitive/(NA*vol)
rho = 3489.93 kg/m^3
B := 154*GPa
G := 97*GPa
E := 9*B*G/(3*B + G) = 240.504 GPa
vi := E/(2*G) - 1 = 0.239714
vS := (G/rho)^(1/2)
vS = 5272.03 m/s
vL := ((3*B + 4*G)/(3*rho))^(1/2)
vL = 9010.33 m/s
va := (1/3*(1/vL^3 + 2/vS^3))^(-1/3)
va = 5845.97 m/s
vi := (1 - 2*(vS/vL)^2)/(2 - 2*(vS/vL)^2)
vi = 0.239714
Temp := 300*K
γ := 9/2*((vL^2 - 4/3*vS^2)/(vL^2 + 2*vS^2)) = 1.45182
γ := 3/2*((1 + vi)/(2 - 3*vi)) = 1.45182
1200/4^(1/3) = 755.953
TD := h/(2*k)*va*nthroot(6/pi*n_p/vol_p, 3) = 789.399 K
A := (0.849*3*nthroot(4, 3))/(20*pi^3)/(1 - 0.514/γ + 0.228/γ^2) = 0.00864211
Ta := TD*1/nthroot(n_p, 3) = 183.203 K
kL := (0.849*3*nthroot(4, 3))/(20*pi^3)*((k*Ta)/(h/(2*pi)))^2*((k*Mav*vol_p^(1/3))/((h/(2*pi))*γ^2))*Ta/Temp = 5.05472 kg*m/(s^3*K)
kL := cos(0.943607*γ^2)*(-3.21363)*A*((k*Ta)/(h/(2*pi)))^2*((k*Mav*vol_p^(1/3))/((h/(2*pi))*γ^2))*Ta/Temp = 8.74595 kg*m/(s^3*K)
