Ang := 10^-10*m
NA := 6.022*10^23*mol^-1
gr := 1*10^-3 kg
k = 1.38065e-23 kg*m^2/(s^2*K)
pi := 3.142
h = 6.62607e-34 kg*m^2/s
mCa := 40.078*gr/mol
GPa = 1000000000 Pa
mO := 15.999*gr/mol
mO = 0.015999 kg/mol
mmol_CaO := mCa + mO = 0.056077 kg/mol
mmol_primitive := mmol_CaO = 0.056077 kg/mol
n := 8
Mav := mmol_CaO/(2*NA)
vol := 111.08*Ang^3
vol_p := vol/3 = 37.0267 Ang^3
Mav := 3*mmol_CaO/(n*NA) = 3.49201e-26 kg
n_p := n/3
Mav_p := mmol_CaO/(n_p*NA) = 3.49201e-26 kg
δ := (vol/n)^(1/3)
δ = 2.40352e-10 m
δ_p := (vol_p/n_p)^(1/3) = 2.40352e-10 m
vol_p := n_p*δ^3
vol_p = 3.70267e-26 L
rho := 3*mmol_CaO/(NA*vol) = 2514.95 kg/m^3
B := 106*GPa
G := 75.55*GPa
vS := (G/rho)^(1/2)
vS = 5480.91 m/s
vL := ((3*B + 4*G)/(3*rho))^(1/2)
vL = 9066.52 m/s
va := (1/3*(1/vL^3 + 2/vS^3))^(-1/3)
va = 6058.73 m/s
vi := (1 - 2*(vS/vL)^2)/(2 - 2*(vS/vL)^2)
vi = 0.212044
Temp := 300*K
γ := 9/2*((vL^2 - 4/3*vS^2)/(vL^2 + 2*vS^2)) = 1.33302
γ := 3/2*((1 + vi)/(2 - 3*vi)) = 1.33302
A := 0.849*(3*nthroot(4, 3))/(20*pi^3*(1 - 0.514/γ + 0.228/γ^2)) = 0.0087749
δ = 2.40352e-10 m
TD := h/(2*k)*va*nthroot(6/pi*n_p/vol_p, 3) = 750.455 K
(vol/5)^(1/3) = 2.81118e-10 m
Ta := TD*1/nthroot(n_p, 3) = 541.171 K
kL := A*(2*pi*(k*Ta)/h)^2*((2*pi*k*Mav*vol_p^(1/3))/(h*γ^2))*Ta/Temp = 68.1638 kg*m/(s^3*K)
