Ang := 10^-10*m
NA := 6.022*10^23*mol^-1
gr := 1*10^-3 kg
k = 1.38065e-23 kg*m^2/(s^2*K)
pi := 3.142
h = 6.62607e-34 kg*m^2/s
mEr := 167.26*gr/mol
GPa = 1000000000 Pa
mO := 15.999*gr/mol
mO = 0.015999 kg/mol
mmol_Er2O3 := 2*mEr + 3*mO = 0.382517 kg/mol
m := 0.226/5 = 0.0452
mmol_primitive := 16*mmol_Er2O3 = 6.12027 kg/mol
n := 80
Mav := mmol_Er2O3/(5*NA)
vol := 1142.65*Ang^3
vol_p := vol/2 = 571.325 Ang^3
Mav := 16*mmol_Er2O3/(n*NA) = 1.2704e-25 kg
n_p := 40
Mav_p := 8*mmol_Er2O3/(n_p*NA) = 1.2704e-25 kg
δ := (vol/n)^(1/3)
δ = 2.42628e-10 m
δ_p := (vol_p/n_p)^(1/3) = 2.42628e-10 m
vol_p := n_p*δ^3
vol_p = 5.71325e-25 L
rho := mmol_primitive/(NA*vol) = 8894.4 kg/m^3
B := 147*GPa
G := 67*GPa  # (MaterialsProject)
vS := (G/rho)^(1/2)
vS = 2744.6 m/s
vL := ((3*B + 4*G)/(3*rho))^(1/2)
vL = 5154.71 m/s
va := (1/3*(1/vL^3 + 2/vS^3))^(-1/3)
va = 3066.5 m/s
vi := (1 - 2*(vS/vL)^2)/(2 - 2*(vS/vL)^2)
vi = 0.302165
Temp := 300*K
γ := 9/2*((vL^2 - 4/3*vS^2)/(vL^2 + 2*vS^2)) = 1.78623
γ := 3/2*((1 + vi)/(2 - 3*vi)) = 1.78623
A := 0.849*(3*nthroot(4, 3))/(20*pi^3*(1 - 0.514/γ + 0.228/γ^2)) = 0.00831603
δ = 2.42628e-10 m
TD := h/(2*k)*va*nthroot(6/pi*n_p/vol_p, 3) = 376.264 K
(vol/5)^(1/3) = 6.11384e-10 m
Ta := TD*1/nthroot(n_p, 3) = 110.02 K
kL := A*(2*pi*(k*Ta)/h)^2*((2*pi*k*Mav*vol_p^(1/3))/(h*γ^2))*Ta/Temp = 2.73798 kg*m/(s^3*K)
kL := B^(1/2)*np^(1/9)*A  # error: La variabile è indefinita. Controllare che l'etichetta sia impostata correttamente.
km := 1 - 0.06 = 0.94
(6*pi^2)^(2/3)/(4*pi) = 1.20905
kL := mmol_Y2O3/NA*va^3/(Temp*vol^(2/3)*γ)*(1/40^(1/3))  # error: La variabile è indefinita. Controllare che l'etichetta sia impostata correttamente.
