Ang := 10^-10*m
NA := 6.022*10^23*mol^-1
gr := 1*10^-3 kg
h = 6.62607e-34 kg*m^2/s
k = 1.38065e-23 kg*m^2/(s^2*K)
pi := 3.142
mEr := 167.26*gr/mol
mGa := 69.723*gr/mol
GPa = 1000000000 Pa
mO := 16*gr/mol
mmol_Er3Ga5O12 := 3*mEr + 5*mGa + 12*mO = 1.04239 kg/mol
mmol_conv := 8*mmol_Er3Ga5O12 = 8.33916 kg/mol
vol := 942.231*2*Ang^3
Mav := mmol_Er3Ga5O12/(20*NA) = 8.65489e-26 kg
n := 160
n_p := n/2
δ := (vol/n)^(1/3)
δ = 2.27522e-10 m
vol_p := 80*δ^3
vol_p = 9.42231e-25 L
rho := mmol_conv/(NA*vol)
rho = 7348.42 kg/m^3
# https://legacy.materialsproject.org/materials/mp-12236/
B := 197.65 GPa
G := 75.76*GPa
E := 9*B*G/(3*B + G) = 201.531 GPa
vi := E/(2*G) - 1 = 0.330061
vS := (G/rho)^(1/2)
vS = 3210.87 m/s
vL := ((3*B + 4*G)/(3*rho))^(1/2)
vL = 6375.2 m/s
va := (1/3*(1/vL^3 + 2/vS^3))^(-1/3)
va = 3600.44 m/s
vi := (1 - 2*(vS/vL)^2)/(2 - 2*(vS/vL)^2)
vi = 0.330061
Temp := 300*K
γ := 9/2*((vL^2 - 4/3*vS^2)/(vL^2 + 2*vS^2)) = 1.9757
γ := 3/2*((1 + vi)/(2 - 3*vi)) = 1.9757
1200/4^(1/3) = 755.953
TD := h/(2*k)*va*nthroot(6/pi*n_p/vol_p, 3) = 471.112 K
A := (0.849*3*nthroot(4, 3))/(20*pi^3)/(1 - 0.514/γ + 0.228/γ^2) = 0.00816448
Ta := TD*1/nthroot(n_p, 3) = 109.336 K
kL := A*((k*Ta)/(h/(2*pi)))^2*((k*Mav*vol_p^(1/3))/((h/(2*pi))*γ^2))*Ta/Temp = 1.73576 kg*m/(s^3*K)
