Ang := 10^-10*m
NA := 6.022*10^23*mol^-1
gr := 1*10^-3 kg
k = 1.38065e-23 kg*m^2/(s^2*K)
pi := 3.142
h = 6.62607e-34 kg*m^2/s
mGd := 157.25*gr/mol
GPa = 1000000000 Pa
mO := 15.999*gr/mol
mO = 0.015999 kg/mol
mmol_Gd2O3 := 2*mGd + 3*mO = 0.362497 kg/mol
m := 0.226/5 = 0.0452
mmol_primitive := 16*mmol_Gd2O3 = 5.79995 kg/mol
n := 80
Mav := mmol_Gd2O3/(5*NA)
vol := 1261.82*Ang^3
vol_p := vol/2 = 630.91 Ang^3
Mav := 16*mmol_Gd2O3/(n*NA) = 1.20391e-25 kg
n_p := 40
Mav_p := 8*mmol_Gd2O3/(n_p*NA) = 1.20391e-25 kg
δ := (vol/n)^(1/3)
δ = 2.50786e-10 m
δ_p := (vol_p/n_p)^(1/3) = 2.50786e-10 m
vol_p := n_p*δ^3
vol_p = 6.3091e-25 L
rho := mmol_primitive/(NA*vol)
rho = 7632.84 kg/m^3
B := 131 GPa
G := 55 GPa
vS := (G/rho)^(1/2)
vS = 2684.34 m/s
vL := ((3*B + 4*G)/(3*rho))^(1/2)
vL = 5174 m/s
va := (1/3*(1/vL^3 + 2/vS^3))^(-1/3)
va = 3004.45 m/s
vi := (1 - 2*(vS/vL)^2)/(2 - 2*(vS/vL)^2)
vi = 0.315848
Temp := 300*K
γ := 9/2*((vL^2 - 4/3*vS^2)/(vL^2 + 2*vS^2)) = 1.8754
γ := 3/2*((1 + vi)/(2 - 3*vi)) = 1.8754
A := 0.849*(3*nthroot(4, 3))/(20*pi^3*(1 - 0.514/γ + 0.228/γ^2)) = 0.0082419
δ = 2.50786e-10 m
TD := h/(2*k)*va*nthroot(6/pi*n_p/vol_p, 3) = 356.659 K
(vol/5)^(1/3) = 6.3194e-10 m
Ta := TD*1/nthroot(n_p, 3) = 104.288 K
kL := A*(2*pi*(k*Ta)/h)^2*((2*pi*k*Mav*vol_p^(1/3))/(h*γ^2))*Ta/Temp = 2.05365 kg*m/(s^3*K)
