Ang := 10^-10*m
NA := 6.022*10^23*mol^-1
gr := 1*10^-3 kg
h = 6.62607e-34 kg*m^2/s
k = 1.38065e-23 kg*m^2/(s^2*K)
pi := 3.142
mGd := 157.2*gr/mol
mAl := 26.98*gr/mol
GPa = 1000000000 Pa
mO := 16*gr/mol
mmol_Gd3Al5O12 := 3*mGd + 5*mAl + 12*mO = 0.7985 kg/mol
mmol_conv_cell := 8*mmol_Gd3Al5O12 = 6.388 kg/mol
vol := 910.340*2*Ang^3 = 1.82068e-24 L
Mav := mmol_Gd3Al5O12/(20*NA) = 6.62986e-26 kg
n := 160
n_p := n/2
δ := (vol/n)^(1/3)
δ = 2.24925e-10 m
vol_p := n_p*δ^3
vol_p = 9.1034e-25 L
rho := mmol_conv_cell/(NA*vol)
rho = 5826.27 kg/m^3
B := 204.94 GPa
G := 101.05*GPa
E := 9*B*G/(3*B + G) = 260.358 GPa
vi := E/(2*G) - 1 = 0.288265
vS := (G/rho)^(1/2)
vS = 4164.6 m/s
vL := ((3*B + 4*G)/(3*rho))^(1/2)
vL = 7635.46 m/s
va := (1/3*(1/vL^3 + 2/vS^3))^(-1/3)
va = 4644.91 m/s
vi := (1 - 2*(vS/vL)^2)/(2 - 2*(vS/vL)^2)
vi = 0.288265
Temp := 300*K
γ := 9/2*((vL^2 - 4/3*vS^2)/(vL^2 + 2*vS^2)) = 1.70224
γ := 3/2*((1 + vi)/(2 - 3*vi)) = 1.70224
1200/4^(1/3) = 755.953
TD := h/(2*k)*va*nthroot(6/pi*n_p/vol_p, 3) = 614.795 K
A := (0.849*3*nthroot(4, 3))/(20*pi^3)/(1 - 0.514/γ + 0.228/γ^2) = 0.00839067
Ta := TD*1/nthroot(n_p, 3) = 142.681 K
kL := A*((k*Ta)/(h/(2*pi)))^2*((k*Mav*vol_p^(1/3))/((h/(2*pi))*γ^2))*Ta/Temp = 4.04417 kg*m/(s^3*K)
