Ang := 10^-10*m
NA := 6.022*10^23*mol^-1
gr := 1*10^-3 kg
h = 6.62607e-34 kg*m^2/s
k = 1.38065e-23 kg*m^2/(s^2*K)
pi := 3.142
mGd := 157.2*gr/mol
mGa := 69.723*gr/mol
GPa = 1000000000 Pa
mO := 16*gr/mol
mmol_Gd3Ga5O12 := 3*mGd + 5*mGa + 12*mO = 1.01221 kg/mol
mmol_primitive := 8*mmol_Gd3Ga5O12 = 8.09772 kg/mol
vol := 1921.01*Ang^3
Mav := mmol_Gd3Ga5O12/(20*NA) = 8.40431e-26 kg
n := 160
n_p := 80
δ := (vol/n)^(1/3)
δ = 2.28983e-10 m
vol_p := 80*δ^3
vol_p = 9.60505e-25 L
rho := mmol_primitive/(NA*vol)
rho = 6999.91 kg/m^3
B := 186.7 GPa
G := 88.4*GPa
E := 9*B*G/(3*B + G) = 229.049 GPa
vi := E/(2*G) - 1 = 0.295528
vS := (G/rho)^(1/2)
vS = 3553.69 m/s
vL := ((3*B + 4*G)/(3*rho))^(1/2)
vL = 6596.22 m/s
va := (1/3*(1/vL^3 + 2/vS^3))^(-1/3)
va = 3967.16 m/s
vi := (1 - 2*(vS/vL)^2)/(2 - 2*(vS/vL)^2)
vi = 0.295528
Temp := 300*K
γ := 9/2*((vL^2 - 4/3*vS^2)/(vL^2 + 2*vS^2)) = 1.74534
γ := 3/2*((1 + vi)/(2 - 3*vi)) = 1.74534
1200/4^(1/3) = 755.953
TD := h/(2*k)*va*nthroot(6/pi*n_p/vol_p, 3) = 515.783 K
A := (0.849*3*nthroot(4, 3))/(20*pi^3)/(1 - 0.514/γ + 0.228/γ^2) = 0.00835177
Ta := TD*1/nthroot(n_p, 3) = 119.703 K
kL := A*((k*Ta)/(h/(2*pi)))^2*((k*Mav*vol_p^(1/3))/((h/(2*pi))*γ^2))*Ta/Temp = 2.91787 kg*m/(s^3*K)
kL := cos(0.943607*γ^2)*(-3.21363)*A*((k*Ta)/(h/(2*pi)))^2*((k*Mav*vol_p^(1/3))/((h/(2*pi))*γ^2))*Ta/Temp = 9.04431 kg*m/(s^3*K)
