Ang := 10^-10*m
NA := 6.022*10^23*mol^-1
gr := 1*10^-3 kg
h = 6.62607e-34 kg*m^2/s
k = 1.38065e-23 kg*m^2/(s^2*K)
pi := 3.142
mHo := 164.93*gr/mol
mAl := 26.98*gr/mol
GPa = 1000000000 Pa
mO := 16*gr/mol
mmol_Ho3Al5O12 := 3*mHo + 5*mAl + 12*mO = 0.82169 kg/mol
mmol_conv_cell := 8*mmol_Ho3Al5O12 = 6.57352 kg/mol
vol := 881.235*2*Ang^3 = 1.76247e-24 L
Mav := mmol_Ho3Al5O12/(20*NA) = 6.8224e-26 kg
n := 160
n_p := n/2
δ := (vol/n)^(1/3)
δ = 2.22502e-10 m
vol_p := n_p*δ^3
vol_p = 8.81235e-25 L
rho := mmol_conv_cell/(NA*vol)
rho = 6193.49 kg/m^3
B := 219.53 GPa
G := 109.64*GPa
E := 9*B*G/(3*B + G) = 281.977 GPa
vi := E/(2*G) - 1 = 0.285923
vS := (G/rho)^(1/2)
vS = 4207.43 m/s
vL := ((3*B + 4*G)/(3*rho))^(1/2)
vL = 7684.31 m/s
va := (1/3*(1/vL^3 + 2/vS^3))^(-1/3)
va = 4691.32 m/s
vi := (1 - 2*(vS/vL)^2)/(2 - 2*(vS/vL)^2)
vi = 0.285923
Temp := 300*K
γ := 9/2*((vL^2 - 4/3*vS^2)/(vL^2 + 2*vS^2)) = 1.6887
γ := 3/2*((1 + vi)/(2 - 3*vi)) = 1.6887
1200/4^(1/3) = 755.953
TD := h/(2*k)*va*nthroot(6/pi*n_p/vol_p, 3) = 627.7 K
A := (0.849*3*nthroot(4, 3))/(20*pi^3)/(1 - 0.514/γ + 0.228/γ^2) = 0.00840316
Ta := TD*1/nthroot(n_p, 3) = 145.676 K
kL := A*((k*Ta)/(h/(2*pi)))^2*((k*Mav*vol_p^(1/3))/((h/(2*pi))*γ^2))*Ta/Temp = 4.45868 kg*m/(s^3*K)
