Ang := 10^-10*m
NA := 6.022*10^23*mol^-1
gr := 1*10^-3 kg
h = 6.62607e-34 kg*m^2/s
k = 1.38065e-23 kg*m^2/(s^2*K)
pi := 3.142
mHo := 164.93*gr/mol
mGa := 69.723*gr/mol
GPa = 1000000000 Pa
mO := 16*gr/mol
mmol_Ho3Ga5O12 := 3*mHo + 5*mGa + 12*mO = 1.03541 kg/mol
mmol_conv := 8*mmol_Ho3Ga5O12 = 8.28324 kg/mol
vol := 948.941*2*Ang^3
Mav := mmol_Ho3Ga5O12/(20*NA) = 8.59685e-26 kg
n := 160
n_p := n/2
δ := (vol/n)^(1/3)
δ = 2.2806e-10 m
vol_p := 80*δ^3
vol_p = 9.48941e-25 L
rho := mmol_conv/(NA*vol)
rho = 7247.53 kg/m^3
B := 195.46 GPa
G := 75.15*GPa
E := 9*B*G/(3*B + G) = 199.839 GPa
vi := E/(2*G) - 1 = 0.3296
vS := (G/rho)^(1/2)
vS = 3220.1 m/s
vL := ((3*B + 4*G)/(3*rho))^(1/2)
vL = 6387.06 m/s
va := (1/3*(1/vL^3 + 2/vS^3))^(-1/3)
va = 3610.57 m/s
vi := (1 - 2*(vS/vL)^2)/(2 - 2*(vS/vL)^2)
vi = 0.3296
Temp := 300*K
γ := 9/2*((vL^2 - 4/3*vS^2)/(vL^2 + 2*vS^2)) = 1.97231
γ := 3/2*((1 + vi)/(2 - 3*vi)) = 1.97231
1200/4^(1/3) = 755.953
TD := h/(2*k)*va*nthroot(6/pi*n_p/vol_p, 3) = 471.322 K
A := (0.849*3*nthroot(4, 3))/(20*pi^3)/(1 - 0.514/γ + 0.228/γ^2) = 0.008167
Ta := TD*1/nthroot(n_p, 3) = 109.384 K
kL := A*((k*Ta)/(h/(2*pi)))^2*((k*Mav*vol_p^(1/3))/((h/(2*pi))*γ^2))*Ta/Temp = 1.73699 kg*m/(s^3*K)
kL := cos(γ^2)*(-3.02)*A*((k*Ta)/(h/(2*pi)))^2*((k*Mav*vol_p^(1/3))/((h/(2*pi))*γ^2))*Ta/Temp = 3.84393 kg*m/(s^3*K)
kL := cos(0.943607*γ^2)*(-3.21363)*A*((k*Ta)/(h/(2*pi)))^2*((k*Mav*vol_p^(1/3))/((h/(2*pi))*γ^2))*Ta/Temp = 4.81895 kg*m/(s^3*K)
