Ang := 10^-10*m
NA := 6.022*10^23*mol^-1
gr := 1*10^-3 kg
k = 1.38065e-23 kg*m^2/(s^2*K)
pi := 3.142
h = 6.62607e-34 kg*m^2/s
mIn := 114.818*gr/mol
mIn = 0.114818 kg/mol
GPa = 1000000000 Pa
mO := 15.999*gr/mol
mO = 0.015999 kg/mol
mmol_In2O3 := 2*mIn + 3*mO = 0.277633 kg/mol
m := 0.226/5 = 0.0452
mmol_primitive := 16*mmol_In2O3 = 4.44213 kg/mol
n := 80
Mav := mmol_In2O3/(5*NA)
vol := 1053.96*Ang^3
vol_p := vol/2 = 526.98 Ang^3
Mav := 16*mmol_In2O3/(n*NA) = 9.22062e-26 kg
n_p := 40
Mav_p := 8*mmol_In2O3/(n_p*NA) = 9.22062e-26 kg
δ := (vol/n)^(1/3)
δ = 2.36181e-10 m
δ_p := (vol_p/n_p)^(1/3) = 2.36181e-10 m
vol_p := n_p*δ^3
vol_p = 5.2698e-25 L
rho := mmol_primitive/(NA*vol)
rho = 6998.84 kg/m^3
# https://next-gen.materialsproject.org/materials/mp-22598
B := 145 GPa
G := 58*GPa
vS := (G/rho)^(1/2)
vS = 2878.73 m/s
vL := ((3*B + 4*G)/(3*rho))^(1/2)
vL = 5636.24 m/s
va := (1/3*(1/vL^3 + 2/vS^3))^(-1/3)
va = 3225.24 m/s
vi := (1 - 2*(vS/vL)^2)/(2 - 2*(vS/vL)^2)
vi = 0.323529
Temp := 300*K
γ := 9/2*((vL^2 - 4/3*vS^2)/(vL^2 + 2*vS^2)) = 1.92857
γ := 3/2*((1 + vi)/(2 - 3*vi)) = 1.92857
A := 0.849*(3*nthroot(4, 3))/(20*pi^3*(1 - 0.514/γ + 0.228/γ^2)) = 0.0082001
δ = 2.36181e-10 m
TD := h/(2*k)*va*nthroot(6/pi*n_p/vol_p, 3) = 406.544 K
(vol/5)^(1/3) = 5.95138e-10 m
Ta := TD*1/nthroot(n_p, 3) = 118.874 K
kL := A*(2*pi*(k*Ta)/h)^2*((2*pi*k*Mav*vol_p^(1/3))/(h*γ^2))*Ta/Temp = 2.06398 kg*m/(s^3*K)
