Ang := 10^-10*m
NA := 6.022*10^23*mol^-1
gr := 1*10^-3 kg
h = 6.62607e-34 kg*m^2/s
k = 1.38065e-23 kg*m^2/(s^2*K)
pi := 3.142
mLu := 174.967*gr/mol
mO := 15.999*gr/mol
mmol_Lu2O3 := 2*mLu + 3*mO = 0.397931 kg/mol
mmol_primitive := 16*mmol_Lu2O3 = 6.3669 kg/mol
vol := 1080.52*Ang^3
vol = 1.08052e-24 L
n := 80
δ := (vol/80)^(1/3)
δ = 2.38148e-10 m
vol_primitive := 80*δ^3
vol_primitive = 1.08052e-24 L
rho := mmol_primitive/(NA*vol)
rho = 9784.85 kg/m^3
E := 181.7 GPa
G := 75.35*GPa = 75.35 GPa
B := G*E/(9*G - 3*E) = 102.902 GPa
vS := (G/rho)^(1/2)
vS = 2775.01 m/s
vL := ((3*B + 4*G)/(3*rho))^(1/2)
vL = 4558.95 m/s
va := (1/3*(1/vL^3 + 2/vS^3))^(-1/3)
va = 3065.45 m/s
vi := (1 - 2*(vS/vL)^2)/(2 - 2*(vS/vL)^2)
vi = 0.205707
a := 0.849*(3*nthroot(4, 3))/(20*pi^3) = 0.00651729
γ := 9/2*((vL^2 - 4/3*vS^2)/(vL^2 + 2*vS^2))
Temp := 300*K
A := a/(1 - 0.514/γ + 0.228/γ^2) = 0.00880379
TD := h/(2*k)*va*nthroot(6/pi*n/vol_primitive, 3) = 383.211 K
Ta := TD*1/nthroot(n, 3) = 88.9353 K
kL := A*((k*Ta)/(h/(2*pi)))^2*((k*mmol_Lu2O3/(5*NA)*vol_primitive^(1/3))/((h/(2*pi))*γ^2))*Ta/Temp = 3.67428 kg*m/(s^3*K)
