Ang := 10^-10*m
NA := 6.022*10^23*mol^-1
gr := 1*10^-3 kg
h = 6.62607e-34 kg*m^2/s
k = 1.38065e-23 kg*m^2/(s^2*K)
pi := 3.142
mMg := 24.305*gr/mol
mSi := 28.085*gr/mol
mAl := 26.98*gr/mol
GPa = 1000000000 Pa
mO := 15.999*gr/mol
mmol_Mg3Al2Si3O12 := 3*mMg + 2*mAl + 3*mSi + 12*mO = 0.403118 kg/mol
mmol_primitive := 4*mmol_Mg3Al2Si3O12 = 1.61247 kg/mol
vol := 1549.31*Ang^3
Mav := mmol_Mg3Al2Si3O12/(20*NA) = 3.34704e-26 kg
n := 160
n_p := n/2
δ := (vol/n)^(1/3)
δ = 2.13144e-10 m
vol_p := 80*δ^3
vol_p = 7.74655e-25 L
rho := 8*mmol_Mg3Al2Si3O12/(NA*vol) = 3456.55 kg/m^3
C11 := 296.2*GPa
C44 := 91.6*GPa
C12 := 111.1*GPa
B := (C11 + 2*C12)/3 = 172.8 GPa
Gv := (C11 - C12 + 3*C44)/5 = 91.98 GPa
Gr := 5*(C11 - C12)*C44/(4*C44 + 3*(C11 - C12)) = 91.9776 GPa
G := (Gv + Gr)/2 = 91.9788 GPa
E := 9*B*G/(3*B + G) = 234.355 GPa
vi := E/(2*G) - 1 = 0.273963
vS := (G/rho)^(1/2)
vS = 5158.49 m/s
vL := ((3*B + 4*G)/(3*rho))^(1/2)
vL = 9245.11 m/s
va := (1/3*(1/vL^3 + 2/vS^3))^(-1/3)
va = 5743.31 m/s
vi := (1 - 2*(vS/vL)^2)/(2 - 2*(vS/vL)^2)
vi = 0.273963
Temp := 300*K
γ := 9/2*((vL^2 - 4/3*vS^2)/(vL^2 + 2*vS^2)) = 1.62204
γ := 3/2*((1 + vi)/(2 - 3*vi)) = 1.62204
1200/4^(1/3) = 755.953
TD := h/(2*k)*va*nthroot(6/pi*n/vol, 3) = 802.196 K
A := (0.849*3*nthroot(4, 3))/(20*pi^3)/(1 - 0.514/γ + 0.228/γ^2) = 0.0084665
Ta := TD*1/nthroot(n_p, 3) = 186.173 K
kL := (0.849*3*nthroot(4, 3))/(20*pi^3)*((k*Ta)/(h/(2*pi)))^2*((k*Mav*vol_p^(1/3))/((h/(2*pi))*γ^2))*Ta/Temp = 3.67673 kg*m/(s^3*K)
