Ang := 10^-10*m
NA := 6.022*10^23*mol^-1
gr := 1*10^-3 kg
k = 1.38065e-23 kg*m^2/(s^2*K)
pi := 3.142
h = 6.62607e-34 kg*m^2/s
mMg := 24.305*gr/mol
GPa = 1000000000 Pa
mO := 15.999*gr/mol
mO = 0.015999 kg/mol
mmol_MgO := mMg + mO = 0.040304 kg/mol
mmol_primitive := mmol_MgO = 0.040304 kg/mol
n := 8
Mav := mmol_MgO/(2*NA)
vol := 73.77*Ang^3
vol_p := vol/4 = 18.4425 Ang^3
Mav := 4*mmol_MgO/(n*NA) = 3.3464e-26 kg
n_p := 2
Mav_p := mmol_MgO/(n_p*NA) = 3.3464e-26 kg
δ := (vol/n)^(1/3)
δ = 2.09699e-10 m
δ_p := (vol_p/n_p)^(1/3) = 2.09699e-10 m
vol_p := n_p*δ^3
vol_p = 1.84425e-26 L
rho := 4*mmol_MgO/(NA*vol)
rho = 3629.01 kg/m^3
# Material Project
B := 151*GPa
G := 119*GPa
vS := (G/rho)^(1/2)
vS = 5726.37 m/s
vL := ((3*B + 4*G)/(3*rho))^(1/2)
vL = 9237.48 m/s
va := (1/3*(1/vL^3 + 2/vS^3))^(-1/3)
va = 6313.73 m/s
vi := (1 - 2*(vS/vL)^2)/(2 - 2*(vS/vL)^2)
vi = 0.187937
Temp := 300*K
γ := 9/2*((vL^2 - 4/3*vS^2)/(vL^2 + 2*vS^2)) = 1.24072
γ := 3/2*((1 + vi)/(2 - 3*vi)) = 1.24072
A := 0.849*(3*nthroot(4, 3))/(20*pi^3*(1 - 0.514/γ + 0.228/γ^2)) = 0.00888114
δ = 2.09699e-10 m
TD := h/(2*k)*va*nthroot(6/pi*n_p/vol_p, 3) = 896.356 K
(vol/5)^(1/3) = 2.45266e-10 m
Ta := TD*1/nthroot(n_p, 3) = 711.438 K
kL := A*(2*pi*(k*Ta)/h)^2*((2*pi*k*Mav*vol_p^(1/3))/(h*γ^2))*Ta/Temp = 137.442 kg*m/(s^3*K)
