Ang := 10^-10*m
NA := 6.022*10^23*mol^-1
gr := 1*10^-3 kg
k = 1.38065e-23 kg*m^2/(s^2*K)
pi := 3.142
h = 6.62607e-34 kg*m^2/s
mNi := 58.693*gr/mol
GPa = 1000000000 Pa
mO := 15.999*gr/mol
mO = 0.015999 kg/mol
mmol_NiO := mNi + mO = 0.074692 kg/mol
mmol_primitive := mmol_NiO = 0.074692 kg/mol
n := 8
Mav := mmol_NiO/(2*NA)
vol := 73.37*Ang^3
vol_p := vol/4 = 18.3425 Ang^3
Mav := 4*mmol_NiO/(n*NA) = 6.20159e-26 kg
n_p := 2
Mav_p := mmol_NiO/(n_p*NA) = 6.20159e-26 kg
δ := (vol/n)^(1/3)
δ = 2.09319e-10 m
δ_p := (vol_p/n_p)^(1/3) = 2.09319e-10 m
vol_p := n_p*δ^3
vol_p = 1.83425e-26 L
rho := 4*mmol_NiO/(NA*vol)
rho = 6761.99 kg/m^3
# Material Project
B := 181*GPa
G := 98*GPa
vS := (G/rho)^(1/2)
vS = 3806.94 m/s
vL := ((3*B + 4*G)/(3*rho))^(1/2)
vL = 6789.03 m/s
va := (1/3*(1/vL^3 + 2/vS^3))^(-1/3)
va = 4236.84 m/s
vi := (1 - 2*(vS/vL)^2)/(2 - 2*(vS/vL)^2)
vi = 0.270671
Temp := 300*K
γ := 9/2*((vL^2 - 4/3*vS^2)/(vL^2 + 2*vS^2)) = 1.6044
γ := 3/2*((1 + vi)/(2 - 3*vi)) = 1.6044
A := 0.849*(3*nthroot(4, 3))/(20*pi^3*(1 - 0.514/γ + 0.228/γ^2)) = 0.00848378
δ = 2.09319e-10 m
TD := h/(2*k)*va*nthroot(6/pi*n_p/vol_p, 3) = 602.592 K
(vol/5)^(1/3) = 2.44821e-10 m
Ta := TD*1/nthroot(n_p, 3) = 478.278 K
kL := A*(2*pi*(k*Ta)/h)^2*((2*pi*k*Mav*vol_p^(1/3))/(h*γ^2))*Ta/Temp = 44.1296 kg*m/(s^3*K)
