Ang := 10^-10*m
NA := 6.022*10^23*mol^-1
gr := 1*10^-3 kg
h = 6.62607e-34 kg*m^2/s
k = 1.38065e-23 kg*m^2/(s^2*K)
pi := 3.142
mSc := 44.955912*gr/mol
mO := 15.999*gr/mol
mmol_Sc2O3 := 2*mSc + 3*mO
mmol_primitive := 16*mmol_Sc2O3
vol := 959.46*Ang^3
vol_p := vol/2 = 479.73 Ang^3
n := 80
n_p := 40
Mav := mmol_Sc2O3/(NA*5) = 4.58017e-26 kg
δ := (vol/n)^(1/3)
δ = 2.289e-10 m
vol_p := n_p*δ^3
vol_p = 4.7973e-25 L
rho := mmol_primitive/(NA*vol)
rho = 3818.95 kg/m^3
B := 179.3*GPa
G := 88.3*GPa
E := 9*B*G/(3*B + G) = 227.547 GPa
vi := E/(2*G) - 1 = 0.288486
vS := (G/rho)^(1/2)
vS = 4808.48 m/s
vL := ((3*B + 4*G)/(3*rho))^(1/2)
vL = 8819.22 m/s
va := (1/3*(1/vL^3 + 2/vS^3))^(-1/3)
va = 5363.21 m/s
vi := (1 - 2*(vS/vL)^2)/(2 - 2*(vS/vL)^2)
vi = 0.288486
Temp := 300*K
γ := 9/2*((vL^2 - 4/3*vS^2)/(vL^2 + 2*vS^2)) = 1.70353
γ := 3/2*((1 + vi)/(2 - 3*vi)) = 1.70353
A := 0.849*(3*nthroot(4, 3))/(20*pi^3*(1 - 0.514/γ + 0.228/γ^2)) = 0.00838949
TD := h/(2*k)*va*nthroot(6/pi*n_p/vol_p, 3) = 697.541 K
Ta := TD*1/nthroot(n_p, 3) = 203.962 K
kL := A*(2*pi*(k*Ta)/h)^2*((2*pi*k*Mav*vol_p^(1/3))/(h*γ^2))*Ta/Temp = 6.58113 kg*m/(s^3*K)
