Ang := 10^-10*m
NA := 6.022*10^23*mol^-1
gr := 1*10^-3 kg
k = 1.38065e-23 kg*m^2/(s^2*K)
pi := 3.142
h = 6.62607e-34 kg*m^2/s
mTm := 168.93422*gr/mol
mTm = 0.168934 kg/mol
GPa = 1000000000 Pa
mO := 15.999*gr/mol
mO = 0.015999 kg/mol
mmol_Tm2O3 := 2*mTm + 3*mO = 0.385865 kg/mol
m := 0.226/5 = 0.0452
mmol_primitive := 16*mmol_Tm2O3 = 6.17385 kg/mol
n := 80
Mav := mmol_Tm2O3/(5*NA)
vol := 1120.32*Ang^3
vol_p := vol/2 = 560.16 Ang^3
Mav := 16*mmol_Tm2O3/(n*NA) = 1.28152e-25 kg
n_p := 40
Mav_p := 8*mmol_Tm2O3/(n_p*NA) = 1.28152e-25 kg
δ := (vol/n)^(1/3)
δ = 2.41037e-10 m
δ_p := (vol_p/n_p)^(1/3) = 2.41037e-10 m
vol_p := n_p*δ^3
vol_p = 5.6016e-25 L
rho := mmol_primitive/(NA*vol)
rho = 9151.09 kg/m^3
B := 139.7 GPa
E := 169.5 GPa
vi := (3*B - E)/(6*B) = 0.297781
G := E/(2*(1 + vi)) = 65.3038 GPa
vS := (G/rho)^(1/2)
vS = 2671.36 m/s
vL := ((3*B + 4*G)/(3*rho))^(1/2)
vL = 4978.03 m/s
va := (1/3*(1/vL^3 + 2/vS^3))^(-1/3)
va = 2983.01 m/s
vi := (1 - 2*(vS/vL)^2)/(2 - 2*(vS/vL)^2)
vi = 0.297781
Temp := 300*K
γ := 9/2*((vL^2 - 4/3*vS^2)/(vL^2 + 2*vS^2)) = 1.75906
γ := 3/2*((1 + vi)/(2 - 3*vi)) = 1.75906
A := 0.849*(3*nthroot(4, 3))/(20*pi^3*(1 - 0.514/γ + 0.228/γ^2)) = 0.00833965
δ = 2.41037e-10 m
TD := h/(2*k)*va*nthroot(6/pi*n_p/vol_p, 3) = 368.436 K
(vol/5)^(1/3) = 6.07376e-10 m
Ta := TD*1/nthroot(n_p, 3) = 107.731 K
kL := A*(2*pi*(k*Ta)/h)^2*((2*pi*k*Mav*vol_p^(1/3))/(h*γ^2))*Ta/Temp = 2.66388 kg*m/(s^3*K)
