Ang := 10^-10*m
NA := 6.022*10^23*mol^-1
gr := 1*10^-3 kg
k = 1.38065e-23 kg*m^2/(s^2*K)
pi := 3.142
h = 6.62607e-34 kg*m^2/s
mY := 88.90585*gr/mol
mY = 0.0889059 kg/mol
GPa = 1000000000 Pa
mO := 15.999*gr/mol
mO = 0.015999 kg/mol
mmol_Y2O3 := 2*mY + 3*mO
mmol_Y2O3 = 0.225809 kg/mol
m := 0.226/5 = 0.0452
mmol_primitive := 16*mmol_Y2O3 = 3.61294 kg/mol
n := 80
Mav := mmol_Y2O3/(5*NA)
vol := 1194.9*Ang^3
vol_p := vol/2 = 597.45 Ang^3
Mav := 16*mmol_Y2O3/(n*NA) = 7.49946e-26 kg
n_p := 40
Mav_p := 8*mmol_Y2O3/(n_p*NA) = 7.49946e-26 kg
δ := (vol/n)^(1/3)
δ = 2.46271e-10 m
δ_p := (vol_p/n_p)^(1/3) = 2.46271e-10 m
vol_p := n_p*δ^3
vol_p = 5.9745e-25 L
rho := mmol_primitive/(NA*vol)
rho = 5020.98 kg/m^3
B := 151.6*GPa
G := 68*GPa
E := 168.33 GPa
vS := (G/rho)^(1/2)
vS = 3680.11 m/s
vL := ((3*B + 4*G)/(3*rho))^(1/2)
vL = 6946.29 m/s
va := (1/3*(1/vL^3 + 2/vS^3))^(-1/3)
va = 4113.16 m/s
vi := (1 - 2*(vS/vL)^2)/(2 - 2*(vS/vL)^2)
vi = 0.304897
Temp := 300*K
γ := 9/2*((vL^2 - 4/3*vS^2)/(vL^2 + 2*vS^2)) = 1.80349
γ := 3/2*((1 + vi)/(2 - 3*vi)) = 1.80349
A := 0.849*(3*nthroot(4, 3))/(20*pi^3*(1 - 0.514/γ + 0.228/γ^2)) = 0.00830127
δ = 2.46271e-10 m
TD := h/(2*k)*va*nthroot(6/pi*n_p/vol_p, 3) = 497.224 K
(vol/5)^(1/3) = 6.20565e-10 m
Ta := TD*1/nthroot(n_p, 3) = 145.389 K
kL := A*(2*pi*(k*Ta)/h)^2*((2*pi*k*Mav*vol_p^(1/3))/(h*γ^2))*Ta/Temp = 3.70721 kg*m/(s^3*K)
