Ang := 10^-10*m
NA := 6.022*10^23*mol^-1
gr := 1*10^-3 kg
h = 6.62607e-34 kg*m^2/s
k = 1.38065e-23 kg*m^2/(s^2*K)
pi := 3.142
mY := 88.91*gr/mol
mFe := 55.845*gr/mol
GPa = 1000000000 Pa
mO := 16*gr/mol
mmol_Y3Fe5O12 := 3*mY + 5*mFe + 12*mO = 0.737955 kg/mol
mmol_primitive := 8*mmol_Y3Fe5O12 = 5.90364 kg/mol
vol := 1981.37*Ang^3
Mav := mmol_Y3Fe5O12/(20*NA) = 6.12716e-26 kg
n := 160
n_p := 80
δ := (vol/n)^(1/3)
δ = 2.31357e-10 m
vol_p := 80*δ^3
vol_p = 9.90685e-25 L
rho := mmol_primitive/(NA*vol) = 4947.82 kg/m^3
C11 := 270.1*GPa
C44 := 77.5*GPa
C12 := 110.9*GPa
B := (C11 + 2*C12)/3 = 163.967 GPa
Gv := (C11 - C12 + 3*C44)/5 = 78.34 GPa
Gr := 5*(C11 - C12)*C44/(4*C44 + 3*(C11 - C12)) = 78.3266 GPa
G := (Gv + Gr)/2 = 78.3333 GPa
E := 9*B*G/(3*B + G) = 202.718 GPa
vi := E/(2*G) - 1 = 0.293944
vS := (G/rho)^(1/2)
vS = 3978.93 m/s
vL := ((3*B + 4*G)/(3*rho))^(1/2)
vL = 7365.35 m/s
va := (1/3*(1/vL^3 + 2/vS^3))^(-1/3)
va = 4440.98 m/s
vi := (1 - 2*(vS/vL)^2)/(2 - 2*(vS/vL)^2)
vi = 0.293944
Temp := 300*K
γ := 9/2*((vL^2 - 4/3*vS^2)/(vL^2 + 2*vS^2)) = 1.7358
γ := 3/2*((1 + vi)/(2 - 3*vi)) = 1.7358
1200/4^(1/3) = 755.953
TD := h/(2*k)*va*nthroot(6/pi*n_p/vol_p, 3) = 571.463 K
A := (0.849*3*nthroot(4, 3))/(20*pi^3)/(1 - 0.514/γ + 0.228/γ^2) = 0.00836027
Ta := TD*1/nthroot(n_p, 3) = 132.625 K
kL := A*((k*Ta)/(h/(2*pi)))^2*((k*Mav*vol_p^(1/3))/((h/(2*pi))*γ^2))*Ta/Temp = 2.95848 kg*m/(s^3*K)
