Ang := 10^-10*m
NA := 6.022*10^23*mol^-1
gr := 1*10^-3 kg
h = 6.62607e-34 kg*m^2/s
k = 1.38065e-23 kg*m^2/(s^2*K)
pi := 3.142
mY := 88.91*gr/mol
mGa := 69.723*gr/mol
GPa = 1000000000 Pa
mO := 16*gr/mol
mmol_Y3Ga5O12 := 3*mY + 5*mGa + 12*mO = 0.807345 kg/mol
mmol_primitive := 8*mmol_Y3Ga5O12 = 6.45876 kg/mol
vol := 1921.01*Ang^3
Mav := mmol_Y3Ga5O12/(20*NA) = 6.7033e-26 kg
n := 160
n_p := 80
δ := (vol/n)^(1/3)
δ = 2.28983e-10 m
vol_p := 80*δ^3
vol_p = 9.60505e-25 L
rho := mmol_primitive/(NA*vol)
rho = 5583.14 kg/m^3
C11 := 280.6*GPa
C44 := 91.4*GPa
C12 := 117.8*GPa
B := (C11 + 2*C12)/3 = 172.067 GPa
Gv := (C11 - C12 + 3*C44)/5 = 87.4 GPa
Gr := 5*(C11 - C12)*C44/(4*C44 + 3*(C11 - C12)) = 87.119 GPa
G := (Gv + Gr)/2 = 87.2595 GPa
E := 9*B*G/(3*B + G) = 223.926 GPa
vi := E/(2*G) - 1 = 0.283102
vS := (G/rho)^(1/2)
vS = 3953.37 m/s
vL := ((3*B + 4*G)/(3*rho))^(1/2)
vL = 7187.33 m/s
va := (1/3*(1/vL^3 + 2/vS^3))^(-1/3)
va = 4406.5 m/s
vi := (1 - 2*(vS/vL)^2)/(2 - 2*(vS/vL)^2)
vi = 0.283102
Temp := 300*K
γ := 9/2*((vL^2 - 4/3*vS^2)/(vL^2 + 2*vS^2)) = 1.6726
γ := 3/2*((1 + vi)/(2 - 3*vi)) = 1.6726
1200/4^(1/3) = 755.953
TD := h/(2*k)*va*nthroot(6/pi*n_p/vol_p, 3) = 572.903 K
A := (0.849*3*nthroot(4, 3))/(20*pi^3)/(1 - 0.514/γ + 0.228/γ^2) = 0.00841817
Ta := TD*1/nthroot(n_p, 3) = 132.959 K
kL := A*((k*Ta)/(h/(2*pi)))^2*((k*Mav*vol_p^(1/3))/((h/(2*pi))*γ^2))*Ta/Temp = 3.50034 kg*m/(s^3*K)
kL := cos(0.943607*γ^2)*(-3.21363)*A*((k*Ta)/(h/(2*pi)))^2*((k*Mav*vol_p^(1/3))/((h/(2*pi))*γ^2))*Ta/Temp = 9.86224 kg*m/(s^3*K)
