Ang := 10^-10*m
NA := 6.022*10^23*mol^-1
gr := 1*10^-3 kg
h = 6.62607e-34 kg*m^2/s
k = 1.38065e-23 kg*m^2/(s^2*K)
pi := 3.142
mY := 88.91*gr/mol
mAl := 26.98*gr/mol
GPa = 1000000000 Pa
mO := 16*gr/mol
mmol_Y3Al5O12 := 3*mY + 5*mAl + 12*mO = 0.59363 kg/mol
mmol_conv_cell := 8*mmol_Y3Al5O12 = 4.74904 kg/mol
vol := 1748.334542*Ang^3
Mav := mmol_Y3Al5O12/(20*NA) = 4.92884e-26 kg
n := 160
n_p := 80
δ := (vol/n)^(1/3)
δ = 2.21906e-10 m
vol_p := 80*δ^3
vol_p = 8.74167e-25 L
rho := mmol_conv_cell/(NA*vol) = 4510.66 kg/m^3
C11 := 328*GPa
C44 := 112*GPa
C12 := 108*GPa
B := (C11 + 2*C12)/3 = 181.333 GPa
Gv := (C11 - C12 + 3*C44)/5 = 111.2 GPa
Gr := 5*(C11 - C12)*C44/(4*C44 + 3*(C11 - C12)) = 111.191 GPa
G := (Gv + Gr)/2 = 111.196 GPa
E := 9*B*G/(3*B + G) = 276.973 GPa
vi := E/(2*G) - 1 = 0.245429
vS := (G/rho)^(1/2)
vS = 4965.05 m/s
vL := ((3*B + 4*G)/(3*rho))^(1/2)
vL = 8548.1 m/s
va := (1/3*(1/vL^3 + 2/vS^3))^(-1/3)
va = 5509.21 m/s
vi := (1 - 2*(vS/vL)^2)/(2 - 2*(vS/vL)^2)
vi = 0.245429
Temp := 300*K
γ := 9/2*((vL^2 - 4/3*vS^2)/(vL^2 + 2*vS^2)) = 1.4783
γ := 3/2*((1 + vi)/(2 - 3*vi)) = 1.4783
1200/4^(1/3) = 755.953
TD := h/(2*k)*va*nthroot(6/pi*n_p/vol_p, 3) = 739.116 K
A := (0.849*3*nthroot(4, 3))/(20*pi^3)/(1 - 0.514/γ + 0.228/γ^2) = 0.00861354
Ta := TD*1/nthroot(n_p, 3) = 171.534 K
kL := A*((k*Ta)/(h/(2*pi)))^2*((k*Mav*vol_p^(1/3))/((h/(2*pi))*γ^2))*Ta/Temp = 7.01535 kg*m/(s^3*K)
