Ang := 10^-10*m
NA := 6.022*10^23*mol^-1
gr := 1*10^-3 kg
h = 6.62607e-34 kg*m^2/s
k = 1.38065e-23 kg*m^2/(s^2*K)
pi := 3.142
mYb := 173.05*gr/mol
mAl := 26.98*gr/mol
GPa = 1000000000 Pa
mO := 16*gr/mol
mmol_Yb3Al5O12 := 3*mYb + 5*mAl + 12*mO = 0.84605 kg/mol
mmol_primitive := 8*mmol_Yb3Al5O12 = 6.7684 kg/mol
vol := 1775.49*Ang^3
Mav := mmol_Yb3Al5O12/(20*NA) = 7.02466e-26 kg
n := 160
n_p := 80
δ := (vol/n)^(1/3)
δ = 2.23049e-10 m
vol_p := 80*δ^3
vol_p = 8.87745e-25 L
rho := mmol_primitive/(NA*vol)
rho = 6330.34 kg/m^3
C11 := 294*GPa
C44 := 108*GPa
C12 := 97*GPa
B := (C11 + 2*C12)/3 = 162.667 GPa
Gv := (C11 - C12 + 3*C44)/5 = 104.2 GPa
Gr := 5*(C11 - C12)*C44/(4*C44 + 3*(C11 - C12)) = 103.988 GPa
G := (Gv + Gr)/2 = 104.094 GPa
E := 9*B*G/(3*B + G) = 257.381 GPa
vi := E/(2*G) - 1 = 0.23629
vS := (G/rho)^(1/2)
vS = 4055.08 m/s
vL := ((3*B + 4*G)/(3*rho))^(1/2)
vL = 6900.82 m/s
va := (1/3*(1/vL^3 + 2/vS^3))^(-1/3)
va = 4494.78 m/s
vi := (1 - 2*(vS/vL)^2)/(2 - 2*(vS/vL)^2)
vi = 0.23629
Temp := 300*K
γ := 9/2*((vL^2 - 4/3*vS^2)/(vL^2 + 2*vS^2)) = 1.43629
γ := 3/2*((1 + vi)/(2 - 3*vi)) = 1.43629
1200/4^(1/3) = 755.953
TD := h/(2*k)*va*nthroot(6/pi*n_p/vol_p, 3) = 599.929 K
A := (0.849*3*nthroot(4, 3))/(20*pi^3)/(1 - 0.514/γ + 0.228/γ^2) = 0.00865906
Ta := TD*1/nthroot(n_p, 3) = 139.231 K
kL := A*((k*Ta)/(h/(2*pi)))^2*((k*Mav*vol_p^(1/3))/((h/(2*pi))*γ^2))*Ta/Temp = 5.72339 kg*m/(s^3*K)
