Ang := 10^-10*m
NA := 6.022*10^23*mol^-1
gr := 1*10^-3 kg
h = 6.62607e-34 kg*m^2/s
k = 1.38065e-23 kg*m^2/(s^2*K)
pi := 3.142
mYb := 173.04*gr/mol
mGa := 69.723*gr/mol
GPa = 1000000000 Pa
mO := 16*gr/mol
mmol_Yb3Ga5O12 := 3*mYb + 5*mGa + 12*mO = 1.05974 kg/mol
mmol_conv := 8*mmol_Yb3Ga5O12 = 8.47788 kg/mol
vol := 952.357*2*Ang^3
Mav := mmol_Yb3Ga5O12/(20*NA) = 8.79886e-26 kg
n := 160
n_p := n/2
δ := (vol/n)^(1/3)
δ = 2.28334e-10 m
vol_p := 80*δ^3
vol_p = 9.52357e-25 L
rho := mmol_conv/(NA*vol)
rho = 7391.23 kg/m^3
# https://legacy.materialsproject.org/materials/mp-562499/
B := 165.82 GPa
G := 56.07*GPa
E := 9*B*G/(3*B + G) = 151.171 GPa
vi := E/(2*G) - 1 = 0.348057
vS := (G/rho)^(1/2)
vS = 2754.27 m/s
vL := ((3*B + 4*G)/(3*rho))^(1/2)
vL = 5705.21 m/s
va := (1/3*(1/vL^3 + 2/vS^3))^(-1/3)
va = 3095.86 m/s
vi := (1 - 2*(vS/vL)^2)/(2 - 2*(vS/vL)^2)
vi = 0.348057
Temp := 300*K
γ := 9/2*((vL^2 - 4/3*vS^2)/(vL^2 + 2*vS^2)) = 2.11553
γ := 3/2*((1 + vi)/(2 - 3*vi)) = 2.11553
1200/4^(1/3) = 755.953
TD := h/(2*k)*va*nthroot(6/pi*n_p/vol_p, 3) = 403.647 K
A := (0.849*3*nthroot(4, 3))/(20*pi^3)/(1 - 0.514/γ + 0.228/γ^2) = 0.00806616
Ta := TD*1/nthroot(n_p, 3) = 93.6782 K
kL := A*((k*Ta)/(h/(2*pi)))^2*((k*Mav*vol_p^(1/3))/((h/(2*pi))*γ^2))*Ta/Temp = 0.959783 kg*m/(s^3*K)
